*Heading
** Job name: Job-4 Model name: connecting_lug
** Generated by: Abaqus/CAE Learning Edition 2025
*Preprint, echo=NO, model=NO, history=NO, contact=NO
**
** PARTS
**
*Part, name=lug
*Node
      1,         100.,          40.,          20.
      2,         100.,          50.,          20.
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*Element, type=C3D8R
 1,  30,  29, 219, 220, 256, 255, 589, 590
 2, 220, 221,  32,  31, 590, 591, 269, 270
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*Nset, nset=_PickedSet10, internal
   3,   4,   9,  10,  11,  12
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*Elset, elset=_PickedSet10, internal
  85,  86,  87,  88,  89,  90
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*Nset, nset=_PickedSet16, internal, generate
   1,  792,    1
*Elset, elset=_PickedSet16, internal, generate
   1,  486,    1
** Section: lug_section
*Solid Section, elset=_PickedSet16, material=steel
,
*End Part
**
**
** ASSEMBLY
**
*Assembly, name=Assembly
**
*Instance, name=lug-1, part=lug
*End Instance
**
*Nset, nset=_PickedSet6, internal, instance=lug-1
  11,  12,  13,  14,  27,  28
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*Elset, elset=_PickedSet6, internal, instance=lug-1
 193, 194, 195, 196, 197, 198
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*Elset, elset=__PickedSurf7_S6, internal, instance=lug-1
 207, 209, 221, 223, 235, 237, 247, 256, 273, 282, 299, 308
*Elset, elset=__PickedSurf7_S3, internal, instance=lug-1, generate
 253,  305,   26
*Elset, elset=__PickedSurf7_S5, internal, instance=lug-1
 213, 217, 227, 231, 241, 245, 263, 289, 315
*Surface, type=ELEMENT, name=_PickedSurf7, internal
__PickedSurf7_S6, S6
__PickedSurf7_S3, S3
__PickedSurf7_S5, S5
*End Assembly
**
** MATERIALS
**
*Material, name=steel
*Elastic
200000., 0.3
**
** BOUNDARY CONDITIONS
**
** Name: fixed_surface Type: Symmetry/Antisymmetry/Encastre
*Boundary
_PickedSet6, PINNED
** ----------------------------------------------------------------
**
** STEP: Load_step
**
*Step, name=Load_step, nlgeom=NO
*Static
1., 1., 1e-05, 1.
**
** LOADS
**
** Name: pressure   Type: Pressure
*Dsload
_PickedSurf7, P, 50.
**
** OUTPUT REQUESTS
**
*Restart, write, frequency=0
**
** FIELD OUTPUT: F-Output-1
**
*Output, field
*Node Output
RF, U
*Element Output, directions=YES
E, NFORC, S
**
** HISTORY OUTPUT: H-Output-1
**
*Output, history, variable=PRESELECT
*End Step
